*Heading
** Job name: Job-1 Model name: Model-1
** Generated by: Abaqus/CAE 6.14-1
*Preprint, echo=NO, model=NO, history=NO, contact=NO
**
** PARTS
**
*Part, name=board
*Node
      1, -0.00300000003, -0.0250000004,           0.
      2, -0.00300000003, -0.0250000004, 0.00499999989
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*Element, type=DC3D8
   1,  164, 1509, 4155,  741,    1,   17,  453,   66
   2, 1509, 1510, 4156, 4155,   17,   18,  454,  453
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*Nset, nset=_PickedSet2, internal, generate
     1,  13442,      1
*Elset, elset=_PickedSet2, internal, generate
     1,  11500,      1
** Section: Section-1
*Solid Section, elset=_PickedSet2, material=ams304
,
*End Part
**
**
** ASSEMBLY
**
*Assembly, name=Assembly
**
*Instance, name=board-1, part=board
*End Instance
**
*Nset, nset=Set-32, instance=board-1
    1,    2,    5,    8,    9,   10
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*Elset, elset=Set-32, instance=board-1, generate
 4251,  7250,     1
*Nset, nset=Set-33, instance=board-1, generate
     1,  13442,      1
*Elset, elset=Set-33, instance=board-1, generate
     1,  11500,      1
*Nset, nset=Set-34, instance=board-1
  4,  7, 15, 16
*Elset, elset=_Surf-2_S2, internal, instance=board-1
    1,    2,    3,    4,    5,    6
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*Elset, elset=_Surf-2_S6, internal, instance=board-1
     1,    11,    21,    31,    41,    51
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*Elset, elset=_Surf-2_S5, internal, instance=board-1
   161,   162,   163,   164,   165,   166
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*Elset, elset=_Surf-2_S4, internal, instance=board-1
    10,    20,    30,    40,    50,    60
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*Elset, elset=_Surf-2_S3, internal, instance=board-1
  7251,  7252,  7253,  7254,  7255,  7256
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*Elset, elset=_Surf-2_S1, internal, instance=board-1
 4081, 4082, 4083, 4084, 4085, 4086
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*Surface, type=ELEMENT, name=Surf-2
_Surf-2_S2, S2
_Surf-2_S6, S6
_Surf-2_S4, S4
_Surf-2_S5, S5
_Surf-2_S3, S3
_Surf-2_S1, S1
*End Assembly
*Amplitude, name=Amp-1, definition=PERIODIC
1,             0.5,              0.,             50.
            10.,             20.
**
** MATERIALS
**
*Material, name=ams304
*Conductivity
 55.7143, 25.0002
 47.6191,   362.5
     30., 793.749
     30., 1343.75
*Density
 7886.67, 2.94147
 7651.11,    400.
 7408.89, 797.059
*Elastic
 2.08e+11, 0.295679,       0.
 2.02e+11,  0.33642,     200.
 1.69e+11, 0.372839,     400.
    1e+11, 0.408642,     600.
 6.11e+10, 0.440741,     800.
 3.46e+10, 0.462346,    1000.
*Expansion
 6.92308e-07, 19.4175
 6.92308e-07, 100.971
    3.75e-06, 699.029
 1.58654e-06, 798.058
 1.38462e-06, 899.029
 2.58654e-06,   1200.
*Plastic
 2.341e+08,         0.,        20.
 3.119e+08, 0.00471206,        20.
 3.556e+08,  0.0217277,        20.
 3.754e+08,  0.0439791,        20.
 3.889e+08,  0.0688482,        20.
 4.016e+08,  0.0997382,        20.
 4.127e+08,   0.149476,        20.
 4.222e+08,   0.199476,        20.
 1.913e+08,         0.,       250.
 2.143e+08, 0.00130892,       250.
 2.302e+08, 0.00759163,       250.
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 1.825e+07,   0.199738,      1000.
*Specific Heat
 455.556,     16.
 648.148,    496.
 737.037, 650.667
 1188.89, 757.333
 737.037, 858.667
 674.074, 949.333
**
** PHYSICAL CONSTANTS
**
*Physical Constants, absolute zero=-273.15, stefan boltzmann=5.6704e-08
**
** BOUNDARY CONDITIONS
**
** Name: BC-1 Type: Displacement/Rotation
*Boundary
Set-34, 1, 1
Set-34, 2, 2
Set-34, 3, 3
Set-34, 4, 4
Set-34, 5, 5
Set-34, 6, 6
**
** PREDEFINED FIELDS
**
** Name: Predefined Field-1   Type: Temperature
*Initial Conditions, type=TEMPERATURE
Set-33, 25.
** ----------------------------------------------------------------
**
** STEP: step-welding
**
*Step, name=step-welding, nlgeom=NO, inc=1000
*Heat Transfer, end=PERIOD, deltmx=50.
0.0001, 10., 1e-06, 10.,
**
** LOADS
**
** Name: Load-1   Type: Body heat flux
*Dflux
Set-32, BFNU, 1.
**
** INTERACTIONS
**
** Interaction: Int-1
*Sfilm
Surf-2, F, 20., 10.
**
** OUTPUT REQUESTS
**
*Restart, write, frequency=0
**
** FIELD OUTPUT: F-Output-1
**
*Output, field, frequency=10
*Node Output
NT,
*Output, history, frequency=0
*End Step
** ----------------------------------------------------------------
**
** STEP: step-cooling
**
*Step, name=step-cooling, nlgeom=NO
*Heat Transfer, end=PERIOD, deltmx=50.
1e-05, 200., 2e-07, 200.,
**
** LOADS
**
** Name: Load-1   Type: Body heat flux
*Dflux, op=NEW
**
** OUTPUT REQUESTS
**
*Restart, write, frequency=0
**
** FIELD OUTPUT: F-Output-1
**
*Output, field, frequency=10
*Node Output
NT,
*Output, history, frequency=0
*End Step
